# ENGENHARIA DE CONTROLE E AUTOMAÇÃO
# ACIONAMENTOS DE MÁQUINAS - 2020.1
#
# SYLVIELLY SOUSA  20162045070410
# Para as questões seguintes, considere um motor CC de ímã permanente com os seguintes parâmetros:  Ra = 0,35 O, La = 1,5 mH, kE = 0,5 V/(rad/s), kT = 0,5 Nm/A e Jm = 0,02 kg · m². O torque nominal do motor é 4 Nm.
R_a := 0.35 Ω
L_a := 1.5 mH
k_E := 0.5*V/(rad/s)
k_T := 0.5*N*m/A
J_m := 0.02 kg*m^2
T_N := 4 N*m
# 1) Desenhe a característica torque-velocidade para Va = 100 V, 60 V e 30 V.
# RESOLUÇÃO:
V_a := 100 V
I_f.nom := 1 A
R_m.nom := 1 Ω
ω_m.nom := 1*rad/s
I_a.nom := 1 A
R_f := 1 Ω
L_f := 1 H
# Para I.a = 0A, ou seja a vazio [sem carga]:
ω_m := V_a/k_E
ω_m = 200 1/s
# I.a para torque nominal T.N:
I_a := T_N/k_T
I_a = 8 A
ω_m = 200 1/s
ω_m := (V_a - R_a*I_a)/k_E
V_a := V_a - 40 V
V_a = 60 V
ω_m := V_a/k_E
ω_m = 120 1/s
ω_m := (V_a - R_a*I_a)/k_E
ω_m = 114.4 1/s
V_a := V_a/2
V_a = 30 V
ω_m := V_a/k_E
ω_m = 60 1/s
ω_m := (V_a - R_a*I_a)/k_E
ω_m = 54.4 1/s
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# 2) Supondo que o motor está acionando uma carga com torque constante de 3 Nm e independente da velocidade, calcule a tensão na armadura Va em regime permanente se a carga é acionada a 1500 rpm.
# RESOLUÇÃO:
T_torque := 3 N*m
rpm := 1
I_a := T_torque/k_T
I_a = 6 A
n_rpm := 1500*rpm
ω_m := n_rpm*((π/30)*rad/s)
ω_m = 157.08 1/s
V_a := ω_m*k_E + R_a*I_a
V_a = 80.6398 V
# 3) Supondo que o motor está acionando uma carga a uma velocidade de 1500 rpm. Em certo instante o motor entra no modo de frenagem regenerativa. Calcule a tensão na armadura Va nesse instante se a corrente Ia não deve superar 10 A. Suponha que a inércia é muito grande e, em consequência, a velocidade muda lentamente.
# RESOLUÇÃO:
I_a := -10 A
ω_motor := n_rpm*(π/30)*rad/s
ω_motor = 157.08 1/s
k_E = 0.5 Wb
V_a := ω_motor*k_E + R_a*I_a
V_a = 75.0398 V
# 4) Supondo que o motor está acionando uma carga a uma velocidade de 1500 rpm. A carga é totalmente inercial com uma inércia de 0,04 kg · m^2. Calcule a energia recuperada por desaceleração a 750 rpm enquanto se mantêm a corrente de frenagem regenerativa em 10 A.
# RESOLUÇÃO:
n_motor := 1500.*rpm
J_L := 0.04*(kg*m^2)
I_regenerativa := -10 A
J_eq := J_m + J_L
J_eq = 0.06 kg*m^2
n_desaceleracao := 750*rpm
ω_motor = 157.08 1/s
T_em := k_T*I_regenerativa
T_em := -5 N*m
ω_m := T_em/J_eq
ω_m = -83.3333 1/s^2
ω_desaceleracao := n_desaceleracao*(π*rad/(30 s))
ω_desaceleracao = 78.5398 1/s
V_a := ω_motor*k_E
V_a = 78.5398 V
V_a := ω_desaceleracao*k_E
V_a = 39.2699 V
Δt_1 := |ω_motor/ω_m|
Δt_1 = 1.88496 s
Δt_2 := |ω_desaceleracao/ω_m|
Δt_2 = 0.942478 s
P_motor := J_eq*(ω_motor^2)
P_motor = 1480.44 J
P_desaceleracao := J_eq*(ω_desaceleracao^2)
P_desaceleracao = 370.11 J
E_motor := P_motor*Δt_1
E_motor = 2790.56 kg*m^2/s
E_desaceleracao := P_desaceleracao*Δt_2
E_desaceleracao = 348.821 kg*m^2/s
ΔE := E_motor - E_desaceleracao
ΔE = 2441.74 kg*m^2/s
# 5) Supondo que o motor está operando em regime permanente com uma velocidade de 300 rad/s. A carga é totalmente inercial com uma inércia de 0,04 kg × m^2. Em algum instante, sua velocidade decresce linearmente e inverte a 100 rad/s em 4 s. Desconsidere o efeito de La e o atrito. Calcule e desenhe a corrente necessária e a tensão Va que deve ser aplicada nos terminais da armadura dessa máquina. Como um passo intermediário, calcule e desenhe Ea, o torque eletromagnético Tem e acorrente Ia do motor.
# RESOLUÇÃO:
J_L := 0.04 kg*m^2
ω_m := 300*rad/s^1
Δt := 4 s
J_eq := J_m + J_L
I_a := T_N/k_T
I_a = 8 A
E_a := ω_m*k_E
E_a = 150 V
V_a := E_a + R_a*I_a
V_a = 152.8 V
ω_decrescente := 100*rad/s
T_em.decrescente := J_eq*ω_decrescente/Δt
T_em.decrescente = 1.5 J
I_a.decrescente := T_em.decrescente/k_T
I_a.decrescente = 3 A
E_a.decrescente := ω_decrescente*k_E
E_a.decrescente = 50 V
V_a.decrescente := E_a.decrescente + R_a*I_a.decrescente
V_a.decrescente = 51.05 V
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# PARA CONDICAO INTERMEDIARIA
ω_interpolacao := 230*rad/s
T_em.interpolacao := J_eq*ω_interpolacao/Δt
T_em.interpolacao = 3.45 J
I_a.interpolacao := T_em.interpolacao/k_T
I_a.interpolacao = 6.9 A
E_a.interpolacao := ω_interpolacao*k_E
E_a.interpolacao = 115 V
V_a.interpolacao := E_a.interpolacao + R_a*I_a.interpolacao
V_a.interpolacao = 117.415 V
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